<?xml version='1.0' encoding='UTF-8'?>
<Lems>

<!-- Wang-Buzsaki basket cell with classical HH Sodium, Potassium and leak conductance + current clamp to make it spike -->

    <Target component="sim1"/>

    <Include file="Cells.xml"/>
    <Include file="Networks.xml"/>
    <Include file="Simulation.xml"/>

    <Include file="WangBuzsakiCell.xml"/>

<!-- End of NeuroML2 content -->

<!-- Simulation specifications -->

    <Simulation id="sim1" length="100ms" step="0.001ms" target="net1">

        <Display id="d1" title="WangBuzsaki PV+BC with 2uA/cm2 input" timeScale="1ms" xmin="-10" xmax="110" ymin="-80" ymax="40">
            <Line id="PV+BC V" quantity="pop/0/wb1/v" scale="1mV" color="#0000ff" timeScale="1ms"/>
        </Display>

        <OutputFile id="of0" fileName="wangbuzsaki.dat">
            <OutputColumn id="bc" quantity="pop/0/wb1/v"/>
        </OutputFile>

    </Simulation>

</Lems>
