<Lems xmlns="http://www.neuroml.org/lems/0.6"
      xmlns:xsi="http://www.w3.org/2001/XMLSchema-instance"
      xsi:schemaLocation="http://www.neuroml.org/lems/0.6 https://raw.github.com/LEMS/LEMS/master/Schemas/LEMS/LEMS_v0.6.xsd">

    <Include file="WangBuzsakiCell.xml"/>
    <Include file="WangBuzsakiSynapse.xml"/>

<!-- Create a network -->

    <!-- The surface of the cell is 100um2 (2pA: 2uA/cm2 input)-->
    <pulseGenerator id="IClamp2" delay="10ms" duration="10ms" amplitude="2pA"/>

    <network id="net2" type="networkWithTemperature" temperature = "37 degC">
        <population id="pop1" component="wb2" type="populationList" size="1">
            <instance id="0">
                <location x="0" y="0" z="0"/>
            </instance>
        </population>
        <population id="pop2" component="wb2" type="populationList" size="1">
            <instance id="0">
                <location x="0" y="0" z="10"/>
            </instance>
        </population>

        <continuousProjection id ="WBsynapse" presynapticPopulation="pop1" postsynapticPopulation="pop2">
            <continuousConnectionInstance id="0" preCell="../pop1/0/wb2" postCell="../pop2/0/wb2" preComponent="silent" postComponent="wbs1"/>
        </continuousProjection>

        <inputList id="IClamp" component="IClamp2" population="pop">
            <input id="0" target="../pop1/0/wb2" destination="synapses"/>
        </inputList>

    </network>

</Lems>
